*heading
*preprint, echo=no, model=no, history=no, contact=no
*part, name=part-1
*node
      1,          15.,           0.,           0.
      2,          15.,           5.,           0.
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*element, type=c3d8
 1,  20,  52,  14,   1,  89, 121,  83,  70
 2,  52,  53,   2,  14, 121, 122,  71,  83
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*nset, nset=set-1, generate
   1,  207,    1
*elset, elset=set-1, generate
  1,  88,   1
*solid section, elset=set-1, material=material-1
,
*end part
*assembly, name=assembly
*instance, name=part-1-1, part=part-1
*end instance
*nset, nset=set-1, instance=part-1-1
   3,   4,  16,  72,  73,  85, 141, 142, 154
*elset, elset=set-1, instance=part-1-1
  4,  8, 48, 52
*nset, nset=set-2, instance=part-1-1
  12,  13,  46,  81,  82, 115, 150, 151, 184
*elset, elset=set-2, instance=part-1-1
 43, 44, 87, 88
*end assembly
*material, name=material-1
*elastic
100., 0.2
*boundary
set-1, encastre
*step, name=step-1, nlgeom=no
*static, direct
0.05, 1.,
*boundary
set-2, 1, 1, -2.
*restart, write, frequency=0
*output, field, variable=preselect
*output, history, variable=preselect
*end step
